# Лабортаорная работа № 10(4)
# Задание 1
f(a, b, d) :=
    f ← (d*a/4)*(3*a*b - e^2 - e^(1 + d)/100)
    return f
f(2, 2, 2) = 4.41009
# Задание 2
a := 1.5
x := 0.8, 0.95 .. 2
f2(x) :=
    π*x^2 - 7/x^2 if x < 1.3
    a*x^3 + 7*sqrt(x) if x == 1.3
    tan(x + 7*sqrt(x)) if x > 1.3
x = [0.8; 0.95; 1.1; 1.25; 1.4; 1.55; 1.7; 1.85; 2]
f2(x) = [-8.92688; -4.92095; -1.9838; 0.428739; 0.263596; 1.11597; 5.87166; -2.53709; -0.787181]
# Задание 3
f1(j) :=
    j ← 4.43
    x ← -1.55*10^-4
    a ← 4.43
    i ← 0
    while j ≤ 5.43
        f1[i] ← sin(j + a) if j < 4.5
        f1[i] ← sqrt(|x|) + j^2 if j ≥ 4.5
        j ← j + 0.1
        i ← i + 1
    return f1
f1(j) → [0.535228271011; 20.5333498996; 21.4493498996; 22.3853498996; 23.3413498996; 24.3173498996; 25.3133498996; 26.3293498996; 27.3653498996; 28.4213498996; 29.4973498996]
