# Лабораторная работа № 1 студента Кохнюк Александры ФИТ 1-3.
# 2.  а)
(4*sqrt(5 - 2*sqrt(6)))/nthroot(3 + 2, 4)*nthroot(2 - 3, 4) = 0.601184 + 0.601184i
# б)
y := (sqrt(2^3 + 8) + cos(|16 - 1|))/nthroot(2^5 + 8*2 + 8, 4) = 1.18451
# в)
t := (sum(sin(1i/8), i = 1 .. 10) + sum(1i - 8, i = 1 .. 5)/(1i + 8))/product((8 + 3*1i)/(64 + 8*1i - 8), i = 1 .. 5) = -884.691 + 69276.5i
3.
x := -2, -1.8 .. 2
y(x) := (x*sin(2*x))/(1 + cos(3*x)) + 1*tan(2*x)^3/5
x = [-2; -1.8; -1.6; -1.4; -1.2; -1; -0.8; -0.6; -0.4; -0.2; 0; 0.2; 0.4; 0.6; 0.8; 1; 1.2; 1.4; 1.6; 1.8; 2]
y(x) = [-1.0826; -0.511303; -0.0859239; 0.929034; 8.00478; 92.948; 8026.24; -2.67982; -0.00769347; 0.0275529; 0; 0.0577833; 0.428937; 4.12709; -8020.15; 88.7751; 7.69734; 0.911058; -0.0858439; -0.463237; -0.461757]
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4.
A := [1, 3, 4; 6, 7, 2; 9, 8, 10]
B := [1, 2, 3; 4, 5, 6; 7, 8, 9]
vectorize(V) := [1; 2; 3]
C := A*B = [41, 49, 57; 48, 63, 78; 111, 138, 165]
d := |A|*|B| = 0
g := V*A*V = [1, 3, 4; 6, 7, 2; 9, 8, 10] V^2
S := B*V = [1, 2, 3; 4, 5, 6; 7, 8, 9] V
E := A^-1*C - B = [0, 0, -3.55271e-15; 0, -3.55271e-15, 0; -8.88178e-16, 0, -3.55271e-15]
q := max(A) = 10
p := min(B) = 1
5.
a := -π/2
b := π/2
integral((t^2 + sin(2*t))/(1 + cos(3*t)^2), t = a .. b) = 1.87138
6.
n := 50
x := -5, -4.8 .. 5
y1 := -5, -4.8 .. 5
f(x, y1) := (sin(x)/x)*(sin(y1)/y1)
# [component: inputs f]
