# Лабораторная работа № 2 Кохнюк Александра ФИТ 1-3
1.
x := -3, -2 .. 3
f1(x) := 1 + x - sin(2*x)
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x := -3, -2 .. 3
f2(x) := e^x + x^2 - 2
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x := 0
root(f1(x), x) = -1.37734
root(f2(x), x) = 0.537274
2.
g(x) := x^4 - 6*x^3 + 4*x^2 + 10*x + 75
k := [75; 10; 4; -6; 1]
x := polyroots(k) = [-1.13791 + 1.63782i; -1.13791 - 1.63782i; 4.13791 - 1.31709i; 4.13791 + 1.31709i]
3.
# 1.
x1 := 15.098
x2 := 1.178
x3 := 15.172
x4 := 0.858
Given
4*x1 - 5*x2 + 7*x3 + 5*x4 = 164.996
2*x1 + x2 - 3*x3 - x4 = -15
9*x1 + 4*x3 - 3*x4 = 193.996
x1 - x2 - 2*x3 - 3*x4 = -18.998
Find(x1, x2, x3, x4) = [15.098; 1.178; 15.172; 0.858]
2.
A := [4, -5, 7, 5; 2, 1, -3, -1; 9, 0, 4, -3; 1, -1, -2, -3]
B := [165; -15; 194; -19]
[x1; x2; x3; x4] := A^-1*B = [15.0985; 1.17846; 15.1723; 0.858462]
3.
lsolve(A, B) = [15.0985; 1.17846; 15.1723; 0.858462]
4.
y := (sin(x) - 1)/2
x := 1.3 - sin(y - 1)
x := 1
y := 1
Given
y := (sin(x) - 1)/2
x := 1.3 - sin(y - 1)
[x; y] := Minerr(x, y) = [2.18161; -0.0792645]
