# Лабораторная работа № 8(3)
1.
a := 1
x := 0
limit((sin(a + x) - sin(a - x))/x, x → 0) → 2*cos(1) = 1.0806
y(x) := x*sin(2*x)/(1 + cos(3*x)) + tan(2*x)^3/5
# Производная функции y(x)
y1(x) := d/dx(y(x)) → 3*tan(2*x)^2*(2*tan(2*x)^2 + 2)/5 + sin(2*x)/(cos(3*x) + 1) + 2*x*cos(2*x)/(cos(3*x) + 1) + 3*x*sin(2*x)*sin(3*x)/(cos(3*x) + 1)^2
q(x) := cos(x)/sqrt(2 - cos(x)^2)
integral(q(x), x) → integral(cos(0)/sqrt(2 - cos(0)^2), 0) =  # error: Здесь необходимо указать имя.
2.
2.1
t(x) := 1 + x - sin(2*x)
1 + x - sin(2*x)
# Символьное решение  x = | -1.37733687712
t1(x) := e^x + x^2 - 2
e^x + x^2 - 2
# Символьное решение  х = | 0.537274449174
2.2
x^4 - 6*x^3 + 4*x^2 + 10*x + 75
[
    sqrt(57*(28144/27 + 80i*sqrt(9105)/9)^(1/3) + 9*(267636736/729 + 4503040i*sqrt(9105)/243)^(1/3) + 1096)/(6*(28144/27 + 80i*sqrt(9105)/9)^(1/6)) + sqrt(-1096*sqrt(57*(28144/27 + 80i*sqrt(9105)/9)^(1/3) + 9*(267636736/729 + 4503040i*sqrt(9105)/243)^(1/3) + 1096) + 15*sqrt(337728 + 2880i*sqrt(9105)) + 114*(28144/27 + 80i*sqrt(9105)/9)^(1/3)*sqrt(57*(28144/27 + 80i*sqrt(9105)/9)^(1/3) + 9*(267636736/729 + 4503040i*sqrt(9105)/243)^(1/3) + 1096) - 9*(267636736/729 + 4503040i*sqrt(9105)/243)^(1/3)*sqrt(57*(28144/27 + 80i*sqrt(9105)/9)^(1/3) + 9*(267636736/729 + 4503040i*sqrt(9105)/243)^(1/3) + 1096))/(6*(28144/27 + 80i*sqrt(9105)/9)^(1/6)*(57*(28144/27 + 80i*sqrt(9105)/9)^(1/3) + 9*(267636736/729 + 4503040i*sqrt(9105)/243)^(1/3) + 1096)^(1/4)) + 3/2;
    3/2 + sqrt(-1096*sqrt(57*(28144/27 + 80i*sqrt(9105)/9)^(1/3) + 9*(267636736/729 + 4503040i*sqrt(9105)/243)^(1/3) + 1096) - 15*sqrt(337728 + 2880i*sqrt(9105)) + 114*(28144/27 + 80i*sqrt(9105)/9)^(1/3)*sqrt(57*(28144/27 + 80i*sqrt(9105)/9)^(1/3) + 9*(267636736/729 + 4503040i*sqrt(9105)/243)^(1/3) + 1096) - 9*(267636736/729 + 4503040i*sqrt(9105)/243)^(1/3)*sqrt(57*(28144/27 + 80i*sqrt(9105)/9)^(1/3) + 9*(267636736/729 + 4503040i*sqrt(9105)/243)^(1/3) + 1096))/(6*(28144/27 + 80i*sqrt(9105)/9)^(1/6)*(57*(28144/27 + 80i*sqrt(9105)/9)^(1/3) + 9*(267636736/729 + 4503040i*sqrt(9105)/243)^(1/3) + 1096)^(1/4)) - sqrt(57*(28144/27 + 80i*sqrt(9105)/9)^(1/3) + 9*(267636736/729 + 4503040i*sqrt(9105)/243)^(1/3) + 1096)/(6*(28144/27 + 80i*sqrt(9105)/9)^(1/6));
    ((57*(28144/27 + 80i*sqrt(9105)/9)^(1/3) + 9*(267636736/729 + 4503040i*sqrt(9105)/243)^(1/3) + 1096)^(3/4) + 9*(28144/27 + 80i*sqrt(9105)/9)^(1/6)*(57*(28144/27 + 80i*sqrt(9105)/9)^(1/3) + 9*(267636736/729 + 4503040i*sqrt(9105)/243)^(1/3) + 1096)^(1/4) - sqrt(-1096*sqrt(57*(28144/27 + sqrt(9105)*80/9*1i)^(1/3) + 9*(267636736/729 + sqrt(9105)*4503040/243*1i)^(1/3) + 1096) + 15*sqrt(337728 + 2880i*sqrt(9105)) + 114*(28144/27 + sqrt(9105)*80/9*1i)^(1/3)*sqrt(57*(28144/27 + sqrt(9105)*80/9*1i)^(1/3) + 9*(267636736/729 + sqrt(9105)*4503040/243*1i)^(1/3) + 1096) - 9*(267636736/729 + sqrt(9105)*4503040/243*1i)^(1/3)*sqrt(57*(28144/27 + sqrt(9105)*80/9*1i)^(1/3) + 9*(267636736/729 + sqrt(9105)*4503040/243*1i)^(1/3) + 1096)))/(6*(28144/27 + 80i*sqrt(9105)/9)^(1/6)*(57*(28144/27 + 80i*sqrt(9105)/9)^(1/3) + 9*(267636736/729 + 4503040i*sqrt(9105)/243)^(1/3) + 1096)^(1/4));
    3/2 - sqrt(-1096*sqrt(57*(28144/27 + 80i*sqrt(9105)/9)^(1/3) + 9*(267636736/729 + 4503040i*sqrt(9105)/243)^(1/3) + 1096) - 15*sqrt(337728 + 2880i*sqrt(9105)) + 114*(28144/27 + 80i*sqrt(9105)/9)^(1/3)*sqrt(57*(28144/27 + 80i*sqrt(9105)/9)^(1/3) + 9*(267636736/729 + 4503040i*sqrt(9105)/243)^(1/3) + 1096) - 9*(267636736/729 + 4503040i*sqrt(9105)/243)^(1/3)*sqrt(57*(28144/27 + 80i*sqrt(9105)/9)^(1/3) + 9*(267636736/729 + 4503040i*sqrt(9105)/243)^(1/3) + 1096))/(6*(28144/27 + 80i*sqrt(9105)/9)^(1/6)*(57*(28144/27 + 80i*sqrt(9105)/9)^(1/3) + 9*(267636736/729 + 4503040i*sqrt(9105)/243)^(1/3) + 1096)^(1/4)) - sqrt(57*(28144/27 + 80i*sqrt(9105)/9)^(1/3) + 9*(267636736/729 + 4503040i*sqrt(9105)/243)^(1/3) + 1096)/(6*(28144/27 + 80i*sqrt(9105)/9)^(1/6))
]
3.
x := -5, -4.9 .. 5
f1(x) := sqrt(x)
f2(x) := e^x
f3(x) := ln(x)
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4.
x := -1.55*10^-4
a := 4.43
j := 4.43, 4.53 .. 5.43
f(j) := if(j < 4.5, sin(j + a), sqrt(|x|) + j^2)
j = [4.43; 4.53; 4.63; 4.73; 4.83; 4.93; 5.03; 5.13; 5.23; 5.33; 5.43]
f(j) = [0.535228; 20.5333; 21.4493; 22.3853; 23.3413; 24.3173; 25.3133; 26.3293; 27.3653; 28.4213; 29.4973]
